# SW potential for Silicon

units		metal
dimension       3
processors      * * *
boundary	p p p

#read data
atom_style      atomic

# read restart
#read_restart    S300K.rest

#read data
read_data	lammps_beta-sn.dat

#potential
pair_style      tersoff
pair_coeff      * * Si-tersoff-1988-9902 Si(C)

neighbor        2.0 bin
neigh_modify    every 1 delay 10 check yes


#outputs
#velocity all create 5000.0 3213112 mom yes rot yes dist gaussian
thermo		10
thermo_style	custom step temp pe ke etotal vol press density spcpu
dump		2 all custom 1000 md.lammpstrj id type x y z

#timestep        1e-3
#replicate unit cell
#replicate       2 2 2

#initial minimization
minimize 1.0e-10 1.0e-10 1 1
#run 0
#initial mixing
#fix             1 all nve temp 300 300 100
#run             100000
#unfix           1

#fix             1 all nvt temp 300 300 100 tchain 5 tloop 2
#run             100000
#unfix           1

#fix             1 all nvt temp 300 5000 100 tchain 5 tloop 2
#run             470000
#unfix           1

#fix             1 all nvt temp 5000 5000 100 tchain 5 tloop 2
#run             100000
#unfix           1

# cooling at 10 K/ps
#fix             1 all nvt temp 3500 300 100
#run             470000
#unfix           1

# final relaxation
#fix             1 all nvt temp 300 300 100
#run             10000
#unfix           1


write_data S300K.dat
write_restart S300K.rest
